<Node dt="0.5" name="root" gravity="0.000 0.000 0.000">
  <Node name="liver">
    <ShapeMatchingNewmarkImplicitSolver name="odesolver" rayleighMass="0.2" rayleighStiffness="0.6"/>
    <MeshVTKLoader createSubelements="0" filename="/opt/msml/examples/PythonExamples/LiverShapeMatching/InitialLowResolutionVolumeModel.vtk" name="LOADER"/>
    <MechanicalObject name="dofs" src="@LOADER" template="Vec3d"/>
    <MeshTopology name="topo" src="@LOADER"/>
    <TetrahedronFEMForceField listening="true" name="FEM" poissonRatio="0.4" template="Vec3d" youngModulus="1000 1000 1000 1000 1000 1000 1000 1000 1000 1000 1000 1000 1000 1000 1000 1000 1000 1000 1000 1000 1000 1000 1000 1000 1000 1000 1000 1000 1000 1000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" method="small"/>
    <TetrahedronSetGeometryAlgorithms name="aTetrahedronSetGeometryAlgorithm" template="Vec3d"/>
    <LinearMeshMatrixMass name="meshMass" massDensity="1.0 1.0 1.0 1.0 1.0 1.0 1.0 1.0 1.0 1.0 1.0 1.0 1.0 1.0 1.0 1.0 1.0 1.0 1.0 1.0 1.0 1.0 1.0 1.0 1.0 1.0 1.0 1.0 1.0 1.0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"/>
    <ShapeMatchingPoissonPotentialForcefield adaptActiveTriangles="1" adaptCharge="1" adaptSamplingDistance="0" charge="500.0" name="shapeConstraint" precomputedPotentialFieldFilename="/opt/msml/examples/PythonExamples/LiverShapeMatching/partial-intra-auto2.stl" samplingDistance="2.0"/>
    <MumpsSolver/>
    <VTKExporter XMLformat="1" edges="0" exportAtEnd="true" exportEveryNumberOfSteps="1" filename="disp" listening="true" tetras="1" triangles="0"/>
  </Node>
</Node>
